*HEADING
*NODE, NSET=ALLNODES
1, 0.00000000000000000000, 0.00000000000000000000
2, 0.05928733296946843423, 0.00000000000000000000
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*USER ELEMENT, NODES=16, TYPE=U1,
PROPERTIES=17, COORDINATES=2
1, 2
*ELEMENT, TYPE=U1, ELSET=ELSET1
1,
1,2,3,4,
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*UEL PROPERTY,ELSET=ELSET1
4, 4, 32, 8, 385, 3, 3, 39,
15, 4, 4, 1, -100, 0, 200000, 0.3,
0.4
*NSET, NSET=NSET_LEFT
1, 36, 71, 106, 141, 176, 211, 246, 281, 316,
351
**
*STEP, NAME=STEP-1, NLGEOM=NO
*STATIC
1., 1., 1., 1.
*BOUNDARY
NSET_LEFT, 1, 2, 0.
*END STEP
