*HEADING

**
*NODE, NSET=ALLNODES
1,	0.00000000000000000000,	0.00000000000000000000,	0.000000000000000
2,	0.11930714071743120375,	0.00000000000000000000,	0.000000000000000
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**
*USER ELEMENT, NODES=64, TYPE=U64, PROPERTIES=23, COORDINATES=3
1, 2, 3
**
*ELEMENT, TYPE=U64, ELSET=ELSET1
1,1,2,3,4,
20,21,22,23,
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**
*UEL PROPERTY,ELSET=ELSET1
4, 4, 4, 16, 4, 4, 931, 3,
3, 3, 23, 11, 11, 4, 4, 4,
1, 0, 0, -100, 200000, 0.3, 0.5
**
** --- Max number of nodes or elements in line is 10!!!!!
*NSET, NSET=Face_X_0
1, 20, 39, 58, 77, 96
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**
*Step, name=Step-1, nlgeom=NO, inc=1
*STATIC
1., 1., 1., 1.
*BOUNDARY, TYPE=DISPLACEMENT
Face_X_0, 1, 3, 0.
*END STEP
