*HEADING
MATLAB generated Abaqus Input File for 3D igUEL subroutine

**
*NODE,NSET=ALLNODES
1, 0, 0, 0
2, 0.1193071407174312, 0, 0
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**
*USER ELEMENT, NODES=64, TYPE=U3, PROPERTIES=23, COORDINATES=3
1, 2, 3
**
*ELEMENT, TYPE=U3, ELSET=ELSET1
1,
1,2,3,4,
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**
*UEL PROPERTY,ELSET=ELSET1
4, 4, 4, 16, 4, 4, 931, 3,
3, 3, 23, 11, 11, 4, 4, 4,
1, 0, 0, -100, 200000, 0.3, 0.5
**
** --- Max number of nodes or elements in line is 10!
**
*NSET, NSET=NSET_left1
1, 20, 39, 58, 77, 96
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**
*NSET, NSET=NSET_left2
2, 21, 40, 59, 78, 97
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**
*NSET, NSET=NSET_right1
19, 38, 57, 76, 95, 114
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**
*NSET, NSET=NSET_right2
18, 37, 56, 75, 94, 113
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**
*NSET, NSET=NSET_bottom1
1, 2, 3, 4, 5, 6
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**
*NSET, NSET=NSET_bottom2
20, 21, 22, 23, 24, 25
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**
*STEP,NAME=STEP1
*STATIC
**
*BOUNDARY, TYPE=DISPLACEMENT
NSET_left1,1,3,0
*END STEP
