*HEADING
MATLAB generated Abaqus Input File for 3D igUEL subroutine

**
*NODE,NSET=ALLNODES
1, -2, -2, -2
2, -1.875, -2, -2
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**
*USER ELEMENT, NODES=125, TYPE=U64, PROPERTIES=23, COORDINATES=3
1, 2, 3
**
*ELEMENT, TYPE=U64, ELSET=ELSET1
1,
1,2,3,4,5,
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**
*UEL PROPERTY,ELSET=ELSET1
5, 5, 5, 8, 8, 8, 1728, 4,
4, 4, 17, 17, 17, 4, 4, 4,
1, 1, 1, 1, 200000, 0.3, 1
**
** --- Max number of nodes or elements in line is 10!
**
*NSET, NSET=NSET_left1
1, 13, 25, 37, 49, 61
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**
*NSET, NSET=NSET_left2
2, 14, 26, 38, 50, 62
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**
*NSET, NSET=NSET_right1
12, 24, 36, 48, 60, 72
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**
*NSET, NSET=NSET_right2
11, 23, 35, 47, 59, 71
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**
*NSET, NSET=NSET_bottom1
1, 2, 3, 4, 5, 6
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**
*NSET, NSET=NSET_bottom2
13, 14, 15, 16, 17, 18
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**
*NSET, NSET=NSET_top1
133, 134, 135, 136, 137, 138
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**
*NSET, NSET=NSET_top2
121, 122, 123, 124, 125, 126
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**
*NSET, NSET=NSET_back1
1, 2, 3, 4, 5, 6
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**
*NSET, NSET=NSET_back2
145, 146, 147, 148, 149, 150
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**
*NSET, NSET=NSET_front1
1585, 1586, 1587, 1588, 1589, 1590
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**
*NSET, NSET=NSET_front2
1441, 1442, 1443, 1444, 1445, 1446
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**
*STEP,NAME=STEP1
*STATIC
**
*BOUNDARY, TYPE=DISPLACEMENT
** Manual edit start --->
NSET_left1,1,1,0
NSET_right1,1,1,0
NSET_bottom1,2,2,0
NSET_top1,2,2,0
NSET_front1,3,3,0
NSET_back1,3,3,0
** Manual edit end   <---
*END STEP
